// COMSOL Multiphysics 6.1.0.252 model "model(JRC=10,not_computed).mph"
// Outline of the model tree
// Components: comp1 "组件 1", mcomp1 "网格组件 1"

Parameters
  rho_water = 998.2[kg/m^3]  // 流体密度
  mu_water = 1.002e-3[Pa*s]  // 动力粘度
  u_inlet = 0.01[m/s]  // 入口流速
  p_outlet = 0[Pa]  // 出口压力
  c_inlet = 1[mol/m^3]  // 入口浓度
  Dm = 2.03e-9[m^2/s]  // 扩散系数

Geometry
  geom1 "几何 1" [comp1] (2D, length unit mm)
    ic1: InterpolationCurve "插值曲线 1"
      source = file
      filename = F:\7.研究生\科研\4.数值模拟重新整理\1.粗糙度的影响\JRC10.txt
      starttang = {98.2319511334, -37.8603905741}
      endtang = {87.3391097737, -69.670856207}
    copy1: Copy "复制 1" | input = ic1; keep = on; displx = 0; disply = 1
    ls1: LineSegment "线段 1" | vertex1 = copy1(1) points 1; vertex2 = ic1(1) points 1
    ls2: LineSegment "线段 2" | vertex1 = copy1(1) points 2; vertex2 = ic1(1) points 2
    csol1: ConvertToSolid "转换为实体 1" | input = copy1, ic1, ls1, ls2
    fin: Finalize "形成联合体"
  mgeom1 "网格几何 1" [mcomp1] (2D, length unit m)

Materials
  mat1: Common "材料 1" [comp1] on domains 1
    def "基本"
      density = rho_water
      dynamicviscosity = mu_water

Physics
  spf: LaminarFlow "层流" [geom1] on all domains
    dependent variable u = {u, v, w}
    fp1: FluidProperties "流体属性 1" (default)
    init1: init "初始值 1" (default) | u_init = {0, 0, 0}
    wallbc1: WallBC "壁 1" (default)
    inl1: InletBoundary "入口 1" on boundaries 1
      BoundaryCondition = FullyDevelopedFlow
      p0 = p_inlet
      PressureType = StaticPressure
      FullyDevelopedFlowOption = Uav
      Uavfdf = u_inlet
      p0avfdf = p_inlet
    out1: OutletBoundary "出口 1" on boundaries 2 | p0 = p_outlet
  tds: DilutedSpecies "稀物质传递" [geom1] on all domains
    dependent variable c
    cdm1: ConvectionDiffusionMigration "传递属性 1" (default) | u_src = root.comp1.u; D_c = Dm
    nflx1: NoFlux "无通量 1" (default)
    init1: init "初始值 1" (default)
    in1: Inflow "流入 1" on boundaries 1 | c0 = c_inlet
    out1: Outflow "流出 1" on boundaries 2

Mesh
  mesh1 "网格 1" [geom1]
    size: MeshSizeDefault "大小" | table = cfd; hmax = 0.213; hmin = 0.00954; hcurve = 0.4; hgrad = 1.2; hauto = 6
    ftri2: FreeTri "自由三角形网格 2" on remaining entities
  mpart1 "网格零件 1" [mgeom1]
    fin: Finalize "定型"

Studies
  std1 "研究 1"
    stat: Stationary "稳态" | solve for = {spf}
    time: Transient "瞬态" | tlist = range(0,0.1,50); solve for = {tds}

Solver configurations
  sol1 "解 1" (study std1)
    v1: Variables "因变量 1"
    s1: Stationary "稳态求解器 1"
      fc1: FullyCoupled "全耦合 1" | linsolver = d1; initstep = 0.01; maxiter = 100
      d1: Direct "直接，流体流动变量 (spf)" | linsolver = pardiso; pivotperturb = 1.0E-13
    su1: StoreSolution "解存储 1"
    v2: Variables "因变量 2" | initmethod = sol; notsolmethod = sol
    t1: Time "瞬态求解器 1" | tlist = range(0,0.1,50); rtol = 0.005; maxorder = 2; stabcntrl = on
      fc1: FullyCoupled "全耦合 1"
        linsolver = d1
        maxiter = 8
        damp = 0.9
        jtech = once
        stabacc = aacc
        aaccdim = 5
        aaccmix = 0.9
        aaccdelay = 1
      d1: Direct "直接，浓度 (tds)" | linsolver = pardiso; pivotperturb = 1.0E-13
  sol2 "解存储 1" (study std1)

Datasets
  dset1: Solution | solution = sol1
  cpt1: CutPoint2D "二维截点 1" | data = dset1; method = file; filename = D:\7.研究生\科研\1.单裂隙中溶质运移\涡旋面积和弥散系数\工况1上边界.txt
  cpt2: CutPoint2D "二维截点 2" | data = dset1; method = file; filename = D:\7.研究生\科研\1.单裂隙中溶质运移\涡旋面积和弥散系数\工况1下边界.txt
  cpt3: CutPoint2D "二维截点 3"
    data = dset1
    method = file
    pointx = 35.5
    pointy = range(3,0.1,5)
    filename = D:\7.研究生\科研\1.单裂隙中溶质运移\数值模拟\涡旋内部浓度变化\坐标点工况1.txt
  dset2: Solution | solution = sol2

Derived values
  av1: AvLine "求雷诺数" on boundaries 1
    data = dset1
    table = tbl1
    expr = {spf.U, spf.U*1.16[mm]*rho_water/mu_water}
    unit = {m/s, 1}
    descr = {速度大小, 雷诺数}
  pev1: EvalPoint "点计算 1" on points 1, 2 | data = dset1; table = tbl2; expr = spf.U; unit = m/s; descr = 速度大小
  av2: AvSurface "求Pe数" on domains 1
    data = dset1
    table = tbl3
    expr = {tds.u, tds.u*1.03[mm]/Dm}
    unit = {m/s, 1}
    descr = {速度场，x 分量, Pe数}
  av3: AvLine "出口浓度均值" on boundaries 2 | data = dset1; table = tbl4; expr = c; unit = mol/m^3; descr = 浓度
  pev2: EvalPoint "点计算 2" | data = cpt3; table = tbl5; expr = c; unit = mol/m^3; descr = 浓度
  int1: IntLine "求积分浓度" | data = dset1; table = tbl6; expr = {spf.U*c, spf.U}; unit = {mol/(m*s), m^2/s}; descr = {, 速度大小}
  int2: IntLine "线积分 2" on boundaries 2 | data = dset1; table = tbl7; expr = spf.U; unit = m^2/s; descr = 速度大小
  av4: AvLine "线平均值 4" on boundaries 1 | data = dset1; table = tbl8; expr = p; unit = Pa; descr = 压力

Tables
  tbl1: Table "表格 1"
    // 线平均值 1
    Time (s) | 速度大小 (m/s) | 雷诺数 (1)
    0 | 0.01 | 11.556
    0.1 | 0.01 | 11.556
    0.2 | 0.01 | 11.556
    0.3 | 0.01 | 11.556
    0.4 | 0.01 | 11.556
    0.5 | 0.01 | 11.556
    0.6 | 0.01 | 11.556
    0.7 | 0.01 | 11.556
    0.8 | 0.01 | 11.556
    0.9 | 0.01 | 11.556
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  tbl2: Table "表格 2"
    // 点计算 1
    Time (s) | 速度大小 (m/s), 点: 2
    0 | 0
    0.1 | 0
    0.2 | 0
    0.3 | 0
    0.4 | 0
    0.5 | 0
    0.6 | 0
    0.7 | 0
    0.8 | 0
    0.9 | 0
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  tbl3: Table "表格 3"
    // 表面平均值 2
    Time (s) | 速度场，x 分量 (m/s) | Pe数 (1)
    0 | 0.00994031 | 10238.5
    0.1 | 0.00994031 | 10238.5
    0.2 | 0.00994031 | 10238.5
    0.3 | 0.00994031 | 10238.5
    0.4 | 0.00994031 | 10238.5
    0.5 | 0.00994031 | 10238.5
    0.6 | 0.00994031 | 10238.5
    0.7 | 0.00994031 | 10238.5
    0.8 | 0.00994031 | 10238.5
    0.9 | 0.00994031 | 10238.5
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  tbl4: Table "表格 4"
    // 出口浓度均值
    Time (s) | 浓度 (mol/m^3)
    0 | 0
    0.1 | 0
    0.2 | 8.06809e-318
    0.3 | -1.53729e-316
    0.4 | -7.5216e-313
    0.5 | 4.63776e-217
    0.6 | 7.52289e-205
    0.7 | 1.58662e-194
    0.8 | 1.00617e-185
    0.9 | 7.60375e-178
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  tbl5: Table "表格 5"
    // 点计算 2
    Time (s) | 浓度 (mol/m^3), 点: (35.3, 3.43) | 浓度 (mol/m^3), 点: (35.4, 3.39) | 浓度 (mol/m^3), 点: (35.5, 3.36) | 浓度 (mol/m^3), 点: (35.6, 3.34) | 浓度 (mol/m^3), 点: (35.7, 3.32) | 浓度 (mol/m^3), 点: (35.5, 4.4)
    0 | 5.10176e-127 | 1.21939e-127 | 2.02015e-128 | 4.19811e-129 | 6.64434e-131 | 5.37863e-124
    0.1 | -5.01265e-90 | -1.14111e-90 | 5.67118e-91 | 1.44802e-91 | 6.02877e-92 | 9.98727e-83
    0.2 | -1.15702e-73 | -2.46661e-74 | 1.60155e-74 | 3.87502e-75 | 1.52228e-75 | 2.31813e-66
    0.3 | 5.20788e-40 | 1.43132e-40 | 5.29952e-41 | 4.76482e-42 | -3.82475e-42 | 4.8163e-35
    0.4 | 7.70786e-32 | 2.08665e-32 | 7.36314e-33 | 8.6263e-34 | -3.31625e-34 | 4.30515e-27
    0.5 | 3.81972e-20 | 1.47694e-20 | 7.21012e-21 | 3.16894e-21 | 1.94062e-21 | 9.32103e-17
    0.6 | 1.86654e-15 | 7.58144e-16 | 3.8573e-16 | 1.789e-16 | 1.13468e-16 | 3.14018e-12
    0.7 | 5.39866e-12 | 2.36182e-12 | 1.2771e-12 | 6.3845e-13 | 4.24557e-13 | 5.09321e-09
    0.8 | 3.61936e-09 | 1.72459e-09 | 1.02138e-09 | 5.70711e-10 | 4.06823e-10 | 1.55907e-06
    0.9 | 5.18154e-07 | 2.69543e-07 | 1.69815e-07 | 1.00722e-07 | 7.34801e-08 | 0.000119095
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  tbl6: Table "表格 6"
    // 线积分 1
    Time (s) | spf.U*c (mol/(m*s)) | 速度大小 (m^2/s)
    0 | 0 | 8.01936e-06
    0.1 | 6.55648e-131 | 8.01936e-06
    0.2 | 4.64994e-88 | 8.01936e-06
    0.3 | 8.48246e-62 | 8.01936e-06
    0.4 | 1.20439e-58 | 8.01936e-06
    0.5 | 9.08626e-56 | 8.01936e-06
    0.6 | 2.77684e-53 | 8.01936e-06
    0.7 | 2.29396e-40 | 8.01936e-06
    0.8 | 3.38637e-39 | 8.01936e-06
    0.9 | 4.66286e-38 | 8.01936e-06
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  tbl7: Table "表格 7"
    // 线积分 2
    Time (s) | 速度大小 (m^2/s)
    0 | 1.02346e-05
    0.1 | 1.02346e-05
    0.2 | 1.02346e-05
    0.3 | 1.02346e-05
    0.4 | 1.02346e-05
    0.5 | 1.02346e-05
    0.6 | 1.02346e-05
    0.7 | 1.02346e-05
    0.8 | 1.02346e-05
    0.9 | 1.02346e-05
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  tbl8: Table "表格 8"
    // 线平均值 4
    Time (s) | 压力 (Pa)
    0 | 12.8902
    0.1 | 12.8902
    0.2 | 12.8902
    0.3 | 12.8902
    0.4 | 12.8902
    0.5 | 12.8902
    0.6 | 12.8902
    0.7 | 12.8902
    0.8 | 12.8902
    0.9 | 12.8902
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
Plots
  pg1: PlotGroup2D "速度 (spf)" | data = dset1
    surf1: Surface "表面" | expr = spf.U
    str1: Streamline "流线 1" (disabled) | expr = {u, v}; udist = 0.001
    arws1: ArrowSurface "面上箭头 1" (disabled)
      expr = {u, v}
      arrowxmethod = coord
      xcoord = range(0,0.1,100)
      arrowymethod = coord
      ycoord = range(0,0.01,10)
      arrowlength = normalized
    pt2: Point "点 2" (disabled) | data = cpt2; expr = spf.U; sphereradiusscale = 0.01
    pt3: Point "点 3" (disabled) | data = cpt3; expr = spf.U
  pg2: PlotGroup2D "压力 (spf)" | data = dset1
    con1: Contour "等值线" | expr = p; levelrounding = off
  pg3: PlotGroup2D "浓度" | data = dset1
    surf1: Surface "表面 1" | expr = c; descr = 浓度